# NPT LAMMPS input script for DIR_INDEX
# settings


variable        NAME index DIR_INDEX_NPT
log             ${NAME}.log
variable        infile index MOL_INDEX_1.data


units		        real
atom_style	    full
boundary        p p p
pair_style	    lj/cut/coul/long 12.0
bond_style      harmonic
angle_style     harmonic
dihedral_style  charmm
improper_style  cvff
kspace_style    ewald 0.0001
pair_modify     tail yes
pair_modify     mix arithmetic


variable   simulationTemp equal TEMP_INDEX


variable   pressure_     equal 0.987   # pressure in atm (1 bar)


variable  annealTemp index 600
variable  relaxTemp  index 150
variable  annealSteps equal 50000
variable  relaxSteps  equal 50000
variable  annealtimestep equal 1.0
variable  relaxtimestep equal  1.0


variable  init_equilibration_step equal 300000

variable  npt_run equal 10000000


read_data	    ${infile}

minimize        1e-4 1e-6 10000 100000

velocity	    all create ${simulationTemp} 886874 mom yes rot yes dist gaussian


neighbor	      1.0 bin
neigh_modify    delay 0 every 2 check yes


thermo_style	custom step temp pe etotal press vol density
thermo		    1000


# >>>>>>>>>>>>>>>>>>>>>>>>>>>>>>>>>>>> Speed_Testing then Annealing <<<<<<<<<<<<<<<<<<<<<<<<<<<<<<<<<<<<<<<<<<<<<<<<<<<<<<<<<<<<<<<<

timestep	    ${annealtimestep}
fix	    1       all npt temp ${annealTemp} ${annealTemp} 100.0 iso ${pressure_} ${pressure_} 1000
run		         ${annealSteps}
unfix   1


timestep	    ${relaxtimestep}
fix	    2       all npt temp ${relaxTemp} ${relaxTemp} 100.0 iso ${pressure_} ${pressure_} 1000
run		        ${relaxSteps}
unfix   2

timestep	    ${annealtimestep}
fix	    3       all npt temp ${annealTemp} ${annealTemp} 100.0 iso ${pressure_} ${pressure_} 1000
run		        ${annealSteps}
unfix   3

timestep	    ${relaxtimestep}
fix	    4       all npt temp ${relaxTemp} ${relaxTemp} 100.0 iso ${pressure_} ${pressure_} 1000
run		        ${relaxSteps}
unfix   4
print            "Anneal complete" file Test.txt

velocity	      all scale ${simulationTemp}
velocity        all zero linear units box
velocity        all zero angular units box


write_data      restart_${NAME}_anneal.data


# ############### init equilibration ________________________________________________


fix	       npt4    all npt temp ${simulationTemp} ${simulationTemp} 100.0 iso ${pressure_} ${pressure_} 1000


thermo_style    custom step vol temp press pe ke density
thermo          1000


run              ${init_equilibration_step}
unfix            npt4

write_data      restart_${NAME}_initequilibration.data

# >>>>>>>>>>>>> npt production run <<<<<<<<<<<<<<<<<<<<<<<

variable        dumpfreq   index 1000
variable        thermofreq index 1000
variable        printfreq  index 1000
variable        restartfreq index 1000000


fix	             npt_Bridgman    all npt temp ${simulationTemp} ${simulationTemp} 100.0 iso ${pressure_} ${pressure_} 1000


compute         in_out_pair  all pe/mol/tally all


thermo_style     custom step vol temp press density pe ke etotal enthalpy &
                 ecoul evdwl elong emol epair ebond eangle edihed eimp etail xy xz yz &
                 c_in_out_pair[1] c_in_out_pair[2] c_in_out_pair[3] c_in_out_pair[4]
thermo           ${thermofreq}


# Defining properties to output
variable    step                                equal step
variable    volume                              equal vol
variable    density                             equal density
variable    temp                                equal temp
variable    press                               equal press
variable    ke                                  equal ke
variable    pe                                  equal pe
variable    etotal                              equal etotal
variable    enthalpy                            equal enthalpy
variable    energy_coulumbic                    equal ecoul
variable    energy_Vdwl                         equal evdwl
variable    energy_long                         equal elong
variable    energy_intramolecular               equal emol
variable    energy_pair                         equal epair
variable    energy_intra_Vdwl                   equal c_in_out_pair[1]
variable    energy_intra_coul                   equal c_in_out_pair[2]
variable    energy_inter_Vdwl                   equal c_in_out_pair[3]
variable    energy_inter_coul                   equal c_in_out_pair[4]


print   "Step V Dens T P KE PE U H Ecoul Evdwl Elong Emol Epair Evdwl_intra Ecoul_intra Evdwl_inter Ecoul_inter" &
         file Output_${NAME}.txt
fix     PRINT_results all print ${printfreq} "$(v_step) $(v_volume) $(v_density) $(v_temp) $(v_press) &
         $(v_ke) $(v_pe) $(v_etotal) $(v_enthalpy) $(v_energy_coulumbic) $(v_energy_Vdwl) $(v_energy_long) &
         $(v_energy_intramolecular) $(v_energy_pair) $(v_energy_intra_Vdwl) $(v_energy_intra_coul) &
         $(v_energy_inter_Vdwl) $(v_energy_inter_coul)" append Output_${NAME}.txt title ""


#dump            DUMP_file all custom ${dumpfreq} ${NAME}.lammpstrj id type x y z xu yu zu vx vy vz mol

restart         ${restartfreq} restart_${NAME}.1 restart_${NAME}.2

run             ${npt_run}

write_data      restart_${NAME}_final.data

run 10
